*Heading
Dimension: 22 x 1 x 1
*Preprint, echo=NO, model=NO, history=NO, contact=NO
**
** PARTS
**
*Part, name=beam
*Node
1, -2.5, 0.0, 0.0
2, 0.0, -2.5, 0.0
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*Element, type=B31
1, 1, 7
2, 7, 8
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*Elset, elset=rod_section, generate
1, 1056, 1
*Orientation, name=Ori-1
1, 0, 0, 0, 1, 0
1, 0
*Beam Section, elset=rod_section, material=Graphite, temperature=GRADIENTS, section=RECT
0.05, 0.05
0, 0, -1
*MPC, MODE=NODE
BEAM,423,463
BEAM,381,421
BEAM,171,211
BEAM,717,757
BEAM,255,295
BEAM,87,127
BEAM,507,547
BEAM,45,85
BEAM,591,631
BEAM,843,883
BEAM,129,169
BEAM,759,799
BEAM,465,505
BEAM,633,673
BEAM,297,337
BEAM,339,379
BEAM,3,43
BEAM,213,253
BEAM,801,841
BEAM,549,589
BEAM,675,715
*End Part
*Assembly, name=Assembly
*Instance, name=beam-1, part=beam
*End Instance
*Nset, nset=fixed_nodes, instance=beam-1
6, 48, 90, 132, 174, 216
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*Nset, nset=moved_nodes, instance=beam-1
5, 47, 89, 131, 173, 215
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*End Assembly
** MATERIALS
**
*Material, name=Graphite
*Elastic
** 114 GPA,using Pa
86.6e9, 0.31
*Material, name=Joints
*Elastic
** 114 GPA,using Pa
10.e9, 0.31
**
** BOUNDARY CONDITIONS
**
** Name: BC-1 Type: Symmetry/Antisymmetry/Encastre
*Boundary
fixed_nodes, ENCASTRE
moved_nodes, 1,2,0.
moved_nodes, 4,6,0.
** ----------------------------------------------------------------
**
** STEP: end_load
**
*Step, name=end_load, nlgeom=YES
end load
**Static, RIKS
*Static
.05, 1., 1e-08, .05
**
** LOADS
**
** Name: point_load   Type: enforced displacement
*Boundary
**Cload
moved_nodes, 3,3,-.0002700
**
** OUTPUT REQUESTS
**
*Restart, write, frequency=0
**
** FIELD OUTPUT: F-Output-1
**
*Output, field, variable=PRESELECT
**
** HISTORY OUTPUT: H-Output-1
**
*Output, history, variable=PRESELECT
**
*Node print, nset=moved_nodes
RF
*End Step
** ----------------------------------------------------------------
