*Heading
Stick model for GTM wing with voxel substructure
*Part, name=GTM
**
*Node
1, 75.368495, 31.830698, 7158.694654
2, 82.070252, 34.661080, 7795.244820
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*ELEMENT, TYPE=B31, ELSET=Beams
1, 1, 2
2, 2, 3
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*BEAM SECTION, ELSET=Beams, SECTION=CIRC, MATERIAL=MAT1
0.5
*End Part
*Assembly, name=Assembly
*Instance, name=beam-1, part=GTM
*End Instance
*Nset, nset=fixed_nodes, instance=beam-1
1
*Nset, nset=moved_nodes, instance=beam-1

101
**
**
**
**
**
*End Assembly
*MATERIAL, NAME=MAT1
*ELASTIC
10.6e6,0.33
*BOUNDARY
fixed_nodes, 1, 6, 0.
*STEP, NAME=STEP-1, PERTURBATION
*STATIC
*CLOAD
moved_nodes,2,100
*NODE PRINT
U
RF
*END STEP
