*Heading
Stick model for GTM wing with voxel substructure
*Part, name=GTM
**
*Node
1, 6.280708, 2.652558, 0.596486
2, 6.839188, 2.888423, 0.649526
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*ELEMENT, TYPE=B31, ELSET=Beam_1
1, 1, 2
*ELEMENT, TYPE=B31, ELSET=Beam_2
2, 2, 3
*ELEMENT, TYPE=B31, ELSET=Beam_3
3, 3, 4
*ELEMENT, TYPE=B31, ELSET=Beam_4
4, 4, 5
*ELEMENT, TYPE=B31, ELSET=Beam_5
5, 5, 6
*ELEMENT, TYPE=B31, ELSET=Beam_6
6, 6, 7
*ELEMENT, TYPE=B31, ELSET=Beam_7
7, 7, 8
*ELEMENT, TYPE=B31, ELSET=Beam_8
8, 8, 9
*ELEMENT, TYPE=B31, ELSET=Beam_9
9, 9, 10
*ELEMENT, TYPE=B31, ELSET=Beam_10
10, 10, 11
*ELEMENT, TYPE=B31, ELSET=Beam_11
11, 11, 12
*ELEMENT, TYPE=B31, ELSET=Beam_12
12, 12, 13
*ELEMENT, TYPE=B31, ELSET=Beam_13
13, 13, 14
*ELEMENT, TYPE=B31, ELSET=Beam_14
14, 14, 15
*ELEMENT, TYPE=B31, ELSET=Beam_15
15, 15, 16
*ELEMENT, TYPE=B31, ELSET=Beam_16
16, 16, 17
*ELEMENT, TYPE=B31, ELSET=Beam_17
17, 17, 18
*ELEMENT, TYPE=B31, ELSET=Beam_18
18, 18, 19
*ELEMENT, TYPE=B31, ELSET=Beam_19
19, 19, 20
*ELEMENT, TYPE=B31, ELSET=Beam_20
20, 20, 21
*ELEMENT, TYPE=B31, ELSET=Beam_21
21, 21, 22
*ELEMENT, TYPE=B31, ELSET=Beam_22
22, 22, 23
*ELEMENT, TYPE=B31, ELSET=Beam_23
23, 23, 24
*ELEMENT, TYPE=B31, ELSET=Beam_24
24, 24, 25
*ELEMENT, TYPE=B31, ELSET=Beam_25
25, 25, 26
*ELEMENT, TYPE=B31, ELSET=Beam_26
26, 26, 27
*ELEMENT, TYPE=B31, ELSET=Beam_27
27, 27, 28
*ELEMENT, TYPE=B31, ELSET=Beam_28
28, 28, 29
*ELEMENT, TYPE=B31, ELSET=Beam_29
29, 29, 30
*ELEMENT, TYPE=B31, ELSET=Beam_30
30, 30, 31
*ELEMENT, TYPE=B31, ELSET=Beam_31
31, 31, 32
*ELEMENT, TYPE=B31, ELSET=Beam_32
32, 32, 33
*ELEMENT, TYPE=B31, ELSET=Beam_33
33, 33, 34
*ELEMENT, TYPE=B31, ELSET=Beam_34
34, 34, 35
*ELEMENT, TYPE=B31, ELSET=Beam_35
35, 35, 36
*ELEMENT, TYPE=B31, ELSET=Beam_36
36, 36, 37
*ELEMENT, TYPE=B31, ELSET=Beam_37
37, 37, 38
*ELEMENT, TYPE=B31, ELSET=Beam_38
38, 38, 39
*ELEMENT, TYPE=B31, ELSET=Beam_39
39, 39, 40
*ELEMENT, TYPE=B31, ELSET=Beam_40
40, 40, 41
*ELEMENT, TYPE=B31, ELSET=Beam_41
41, 41, 42
*ELEMENT, TYPE=B31, ELSET=Beam_42
42, 42, 43
*ELEMENT, TYPE=B31, ELSET=Beam_43
43, 43, 44
*ELEMENT, TYPE=B31, ELSET=Beam_44
44, 44, 45
*ELEMENT, TYPE=B31, ELSET=Beam_45
45, 45, 46
*ELEMENT, TYPE=B31, ELSET=Beam_46
46, 46, 47
*ELEMENT, TYPE=B31, ELSET=Beam_47
47, 47, 48
*ELEMENT, TYPE=B31, ELSET=Beam_48
48, 48, 49
*ELEMENT, TYPE=B31, ELSET=Beam_49
49, 49, 50
*ELEMENT, TYPE=B31, ELSET=Beam_50
50, 50, 51
*ELEMENT, TYPE=B31, ELSET=Beam_51
51, 51, 52
*ELEMENT, TYPE=B31, ELSET=Beam_52
52, 52, 53
*ELEMENT, TYPE=B31, ELSET=Beam_53
53, 53, 54
*ELEMENT, TYPE=B31, ELSET=Beam_54
54, 54, 55
*ELEMENT, TYPE=B31, ELSET=Beam_55
55, 55, 56
*ELEMENT, TYPE=B31, ELSET=Beam_56
56, 56, 57
*ELEMENT, TYPE=B31, ELSET=Beam_57
57, 57, 58
*ELEMENT, TYPE=B31, ELSET=Beam_58
58, 58, 59
*ELEMENT, TYPE=B31, ELSET=Beam_59
59, 59, 60
*ELEMENT, TYPE=B31, ELSET=Beam_60
60, 60, 61
*ELEMENT, TYPE=B31, ELSET=Beam_61
61, 61, 62
*ELEMENT, TYPE=B31, ELSET=Beam_62
62, 62, 63
*ELEMENT, TYPE=B31, ELSET=Beam_63
63, 63, 64
*ELEMENT, TYPE=B31, ELSET=Beam_64
64, 64, 65
*ELEMENT, TYPE=B31, ELSET=Beam_65
65, 65, 66
*ELEMENT, TYPE=B31, ELSET=Beam_66
66, 66, 67
*ELEMENT, TYPE=B31, ELSET=Beam_67
67, 67, 68
*ELEMENT, TYPE=B31, ELSET=Beam_68
68, 68, 69
*ELEMENT, TYPE=B31, ELSET=Beam_69
69, 69, 70
*ELEMENT, TYPE=B31, ELSET=Beam_70
70, 70, 71
*ELEMENT, TYPE=B31, ELSET=Beam_71
71, 71, 72
*ELEMENT, TYPE=B31, ELSET=Beam_72
72, 72, 73
*ELEMENT, TYPE=B31, ELSET=Beam_73
73, 73, 74
*ELEMENT, TYPE=B31, ELSET=Beam_74
74, 74, 75
*ELEMENT, TYPE=B31, ELSET=Beam_75
75, 75, 76
*ELEMENT, TYPE=B31, ELSET=Beam_76
76, 76, 77
*ELEMENT, TYPE=B31, ELSET=Beam_77
77, 77, 78
*ELEMENT, TYPE=B31, ELSET=Beam_78
78, 78, 79
*ELEMENT, TYPE=B31, ELSET=Beam_79
79, 79, 80
*ELEMENT, TYPE=B31, ELSET=Beam_80
80, 80, 81
*ELEMENT, TYPE=B31, ELSET=Beam_81
81, 81, 82
*ELEMENT, TYPE=B31, ELSET=Beam_82
82, 82, 83
*ELEMENT, TYPE=B31, ELSET=Beam_83
83, 83, 84
*ELEMENT, TYPE=B31, ELSET=Beam_84
84, 84, 85
*ELEMENT, TYPE=B31, ELSET=Beam_85
85, 85, 86
*ELEMENT, TYPE=B31, ELSET=Beam_86
86, 86, 87
*ELEMENT, TYPE=B31, ELSET=Beam_87
87, 87, 88
*ELEMENT, TYPE=B31, ELSET=Beam_88
88, 88, 89
*ELEMENT, TYPE=B31, ELSET=Beam_89
89, 89, 90
*ELEMENT, TYPE=B31, ELSET=Beam_90
90, 90, 91
*ELEMENT, TYPE=B31, ELSET=Beam_91
91, 91, 92
*ELEMENT, TYPE=B31, ELSET=Beam_92
92, 92, 93
*ELEMENT, TYPE=B31, ELSET=Beam_93
93, 93, 94
*ELEMENT, TYPE=B31, ELSET=Beam_94
94, 94, 95
*ELEMENT, TYPE=B31, ELSET=Beam_95
95, 95, 96
*ELEMENT, TYPE=B31, ELSET=Beam_96
96, 96, 97
*ELEMENT, TYPE=B31, ELSET=Beam_97
97, 97, 98
*ELEMENT, TYPE=B31, ELSET=Beam_98
98, 98, 99
*ELEMENT, TYPE=B31, ELSET=Beam_99
99, 99, 100
*ELEMENT, TYPE=B31, ELSET=Beam_100
100, 100, 101
*BEAM SECTION, ELSET=Beam_1, SECTION=CIRC, MATERIAL=MAT1
0.756721
*BEAM SECTION, ELSET=Beam_2, SECTION=CIRC, MATERIAL=MAT1
0.746182
*BEAM SECTION, ELSET=Beam_3, SECTION=CIRC, MATERIAL=MAT1
0.735177
*BEAM SECTION, ELSET=Beam_4, SECTION=CIRC, MATERIAL=MAT1
0.723654
*BEAM SECTION, ELSET=Beam_5, SECTION=CIRC, MATERIAL=MAT1
0.711552
*BEAM SECTION, ELSET=Beam_6, SECTION=CIRC, MATERIAL=MAT1
0.700113
*BEAM SECTION, ELSET=Beam_7, SECTION=CIRC, MATERIAL=MAT1
0.691068
*BEAM SECTION, ELSET=Beam_8, SECTION=CIRC, MATERIAL=MAT1
0.683316
*BEAM SECTION, ELSET=Beam_9, SECTION=CIRC, MATERIAL=MAT1
0.675291
*BEAM SECTION, ELSET=Beam_10, SECTION=CIRC, MATERIAL=MAT1
0.666970
*BEAM SECTION, ELSET=Beam_11, SECTION=CIRC, MATERIAL=MAT1
0.658324
*BEAM SECTION, ELSET=Beam_12, SECTION=CIRC, MATERIAL=MAT1
0.650205
*BEAM SECTION, ELSET=Beam_13, SECTION=CIRC, MATERIAL=MAT1
0.642824
*BEAM SECTION, ELSET=Beam_14, SECTION=CIRC, MATERIAL=MAT1
0.635328
*BEAM SECTION, ELSET=Beam_15, SECTION=CIRC, MATERIAL=MAT1
0.627557
*BEAM SECTION, ELSET=Beam_16, SECTION=CIRC, MATERIAL=MAT1
0.619486
*BEAM SECTION, ELSET=Beam_17, SECTION=CIRC, MATERIAL=MAT1
0.611415
*BEAM SECTION, ELSET=Beam_18, SECTION=CIRC, MATERIAL=MAT1
0.604281
*BEAM SECTION, ELSET=Beam_19, SECTION=CIRC, MATERIAL=MAT1
0.597846
*BEAM SECTION, ELSET=Beam_20, SECTION=CIRC, MATERIAL=MAT1
0.591195
*BEAM SECTION, ELSET=Beam_21, SECTION=CIRC, MATERIAL=MAT1
0.584312
*BEAM SECTION, ELSET=Beam_22, SECTION=CIRC, MATERIAL=MAT1
0.577177
*BEAM SECTION, ELSET=Beam_23, SECTION=CIRC, MATERIAL=MAT1
0.569869
*BEAM SECTION, ELSET=Beam_24, SECTION=CIRC, MATERIAL=MAT1
0.562425
*BEAM SECTION, ELSET=Beam_25, SECTION=CIRC, MATERIAL=MAT1
0.554728
*BEAM SECTION, ELSET=Beam_26, SECTION=CIRC, MATERIAL=MAT1
0.546695
*BEAM SECTION, ELSET=Beam_27, SECTION=CIRC, MATERIAL=MAT1
0.538292
*BEAM SECTION, ELSET=Beam_28, SECTION=CIRC, MATERIAL=MAT1
0.529578
*BEAM SECTION, ELSET=Beam_29, SECTION=CIRC, MATERIAL=MAT1
0.521794
*BEAM SECTION, ELSET=Beam_30, SECTION=CIRC, MATERIAL=MAT1
0.514972
*BEAM SECTION, ELSET=Beam_31, SECTION=CIRC, MATERIAL=MAT1
0.507867
*BEAM SECTION, ELSET=Beam_32, SECTION=CIRC, MATERIAL=MAT1
0.500452
*BEAM SECTION, ELSET=Beam_33, SECTION=CIRC, MATERIAL=MAT1
0.492691
*BEAM SECTION, ELSET=Beam_34, SECTION=CIRC, MATERIAL=MAT1
0.485253
*BEAM SECTION, ELSET=Beam_35, SECTION=CIRC, MATERIAL=MAT1
0.478991
*BEAM SECTION, ELSET=Beam_36, SECTION=CIRC, MATERIAL=MAT1
0.473294
*BEAM SECTION, ELSET=Beam_37, SECTION=CIRC, MATERIAL=MAT1
0.467385
*BEAM SECTION, ELSET=Beam_38, SECTION=CIRC, MATERIAL=MAT1
0.461242
*BEAM SECTION, ELSET=Beam_39, SECTION=CIRC, MATERIAL=MAT1
0.454843
*BEAM SECTION, ELSET=Beam_40, SECTION=CIRC, MATERIAL=MAT1
0.448712
*BEAM SECTION, ELSET=Beam_41, SECTION=CIRC, MATERIAL=MAT1
0.442963
*BEAM SECTION, ELSET=Beam_42, SECTION=CIRC, MATERIAL=MAT1
0.437057
*BEAM SECTION, ELSET=Beam_43, SECTION=CIRC, MATERIAL=MAT1
0.430902
*BEAM SECTION, ELSET=Beam_44, SECTION=CIRC, MATERIAL=MAT1
0.424471
*BEAM SECTION, ELSET=Beam_45, SECTION=CIRC, MATERIAL=MAT1
0.418079
*BEAM SECTION, ELSET=Beam_46, SECTION=CIRC, MATERIAL=MAT1
0.412618
*BEAM SECTION, ELSET=Beam_47, SECTION=CIRC, MATERIAL=MAT1
0.407841
*BEAM SECTION, ELSET=Beam_48, SECTION=CIRC, MATERIAL=MAT1
0.402889
*BEAM SECTION, ELSET=Beam_49, SECTION=CIRC, MATERIAL=MAT1
0.397748
*BEAM SECTION, ELSET=Beam_50, SECTION=CIRC, MATERIAL=MAT1
0.392400
*BEAM SECTION, ELSET=Beam_51, SECTION=CIRC, MATERIAL=MAT1
0.387393
*BEAM SECTION, ELSET=Beam_52, SECTION=CIRC, MATERIAL=MAT1
0.383032
*BEAM SECTION, ELSET=Beam_53, SECTION=CIRC, MATERIAL=MAT1
0.378783
*BEAM SECTION, ELSET=Beam_54, SECTION=CIRC, MATERIAL=MAT1
0.374387
*BEAM SECTION, ELSET=Beam_55, SECTION=CIRC, MATERIAL=MAT1
0.369831
*BEAM SECTION, ELSET=Beam_56, SECTION=CIRC, MATERIAL=MAT1
0.365139
*BEAM SECTION, ELSET=Beam_57, SECTION=CIRC, MATERIAL=MAT1
0.360677
*BEAM SECTION, ELSET=Beam_58, SECTION=CIRC, MATERIAL=MAT1
0.356432
*BEAM SECTION, ELSET=Beam_59, SECTION=CIRC, MATERIAL=MAT1
0.352031
*BEAM SECTION, ELSET=Beam_60, SECTION=CIRC, MATERIAL=MAT1
0.347457
*BEAM SECTION, ELSET=Beam_61, SECTION=CIRC, MATERIAL=MAT1
0.342696
*BEAM SECTION, ELSET=Beam_62, SECTION=CIRC, MATERIAL=MAT1
0.337874
*BEAM SECTION, ELSET=Beam_63, SECTION=CIRC, MATERIAL=MAT1
0.333138
*BEAM SECTION, ELSET=Beam_64, SECTION=CIRC, MATERIAL=MAT1
0.328349
*BEAM SECTION, ELSET=Beam_65, SECTION=CIRC, MATERIAL=MAT1
0.323340
*BEAM SECTION, ELSET=Beam_66, SECTION=CIRC, MATERIAL=MAT1
0.318087
*BEAM SECTION, ELSET=Beam_67, SECTION=CIRC, MATERIAL=MAT1
0.312560
*BEAM SECTION, ELSET=Beam_68, SECTION=CIRC, MATERIAL=MAT1
0.307337
*BEAM SECTION, ELSET=Beam_69, SECTION=CIRC, MATERIAL=MAT1
0.302543
*BEAM SECTION, ELSET=Beam_70, SECTION=CIRC, MATERIAL=MAT1
0.297577
*BEAM SECTION, ELSET=Beam_71, SECTION=CIRC, MATERIAL=MAT1
0.292349
*BEAM SECTION, ELSET=Beam_72, SECTION=CIRC, MATERIAL=MAT1
0.286825
*BEAM SECTION, ELSET=Beam_73, SECTION=CIRC, MATERIAL=MAT1
0.281355
*BEAM SECTION, ELSET=Beam_74, SECTION=CIRC, MATERIAL=MAT1
0.276873
*BEAM SECTION, ELSET=Beam_75, SECTION=CIRC, MATERIAL=MAT1
0.273109
*BEAM SECTION, ELSET=Beam_76, SECTION=CIRC, MATERIAL=MAT1
0.269184
*BEAM SECTION, ELSET=Beam_77, SECTION=CIRC, MATERIAL=MAT1
0.265078
*BEAM SECTION, ELSET=Beam_78, SECTION=CIRC, MATERIAL=MAT1
0.260773
*BEAM SECTION, ELSET=Beam_79, SECTION=CIRC, MATERIAL=MAT1
0.256362
*BEAM SECTION, ELSET=Beam_80, SECTION=CIRC, MATERIAL=MAT1
0.251885
*BEAM SECTION, ELSET=Beam_81, SECTION=CIRC, MATERIAL=MAT1
0.247209
*BEAM SECTION, ELSET=Beam_82, SECTION=CIRC, MATERIAL=MAT1
0.242252
*BEAM SECTION, ELSET=Beam_83, SECTION=CIRC, MATERIAL=MAT1
0.236970
*BEAM SECTION, ELSET=Beam_84, SECTION=CIRC, MATERIAL=MAT1
0.231446
*BEAM SECTION, ELSET=Beam_85, SECTION=CIRC, MATERIAL=MAT1
0.226705
*BEAM SECTION, ELSET=Beam_86, SECTION=CIRC, MATERIAL=MAT1
0.222766
*BEAM SECTION, ELSET=Beam_87, SECTION=CIRC, MATERIAL=MAT1
0.218605
*BEAM SECTION, ELSET=Beam_88, SECTION=CIRC, MATERIAL=MAT1
0.214192
*BEAM SECTION, ELSET=Beam_89, SECTION=CIRC, MATERIAL=MAT1
0.209488
*BEAM SECTION, ELSET=Beam_90, SECTION=CIRC, MATERIAL=MAT1
0.204445
*BEAM SECTION, ELSET=Beam_91, SECTION=CIRC, MATERIAL=MAT1
0.198997
*BEAM SECTION, ELSET=Beam_92, SECTION=CIRC, MATERIAL=MAT1
0.193062
*BEAM SECTION, ELSET=Beam_93, SECTION=CIRC, MATERIAL=MAT1
0.186522
*BEAM SECTION, ELSET=Beam_94, SECTION=CIRC, MATERIAL=MAT1
0.179212
*BEAM SECTION, ELSET=Beam_95, SECTION=CIRC, MATERIAL=MAT1
0.170878
*BEAM SECTION, ELSET=Beam_96, SECTION=CIRC, MATERIAL=MAT1
0.161109
*BEAM SECTION, ELSET=Beam_97, SECTION=CIRC, MATERIAL=MAT1
0.149147
*BEAM SECTION, ELSET=Beam_98, SECTION=CIRC, MATERIAL=MAT1
0.133322
*BEAM SECTION, ELSET=Beam_99, SECTION=CIRC, MATERIAL=MAT1
0.122677
*BEAM SECTION, ELSET=Beam_100, SECTION=CIRC, MATERIAL=MAT1
0.122677
*End Part
*Assembly, name=Assembly
*Instance, name=beam-1, part=GTM
*End Instance
*Nset, nset=fixed_nodes, instance=beam-1
1
*Nset, nset=moved_nodes, instance=beam-1

101
**
**
**
**
**
*End Assembly
*MATERIAL, NAME=MAT1
*ELASTIC
1.52e9,0.33
*BOUNDARY
fixed_nodes, 1, 6, 0.
*STEP, NAME=STEP-1, PERTURBATION
*STATIC
*CLOAD
moved_nodes,1,10000
*NODE PRINT
U
RF
*END STEP
