*HEADING
3D fracture specimen
*NODE, NSET=lattice_nodes
1, 1.500000, 0.000000, 0.000000
2, 0.000000, 0.000000, -1.500000
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*ELEMENT, TYPE=B31, ELSET=BEAM
1, 1, 2, 7
2, 2, 3, 7
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*ELSET, ELSET=voxel_strut1
1, 13, 25, 37, 49, 61
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*BEAM SECTION, SECTION=RECTANGULAR, ELSET=voxel_strut1, MATERIAL=ultem_2200_polyetherimide_E
 .072, .072
 -0.500000, -0.500000, 1.000000
*ELSET, ELSET=voxel_strut2
2, 14, 26, 38, 50, 62
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*BEAM SECTION, SECTION=RECTANGULAR, ELSET=voxel_strut2, MATERIAL=ultem_2200_polyetherimide_E
 .072, .072
 0.500000, -0.500000, 1.000000
*ELSET, ELSET=voxel_strut3
3, 15, 27, 39, 51, 63
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*BEAM SECTION, SECTION=RECTANGULAR, ELSET=voxel_strut3, MATERIAL=ultem_2200_polyetherimide_E
 .072, .072
 -0.500000, -0.500000, 1.000000
*ELSET, ELSET=voxel_strut4
4, 16, 28, 40, 52, 64
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*BEAM SECTION, SECTION=RECTANGULAR, ELSET=voxel_strut4, MATERIAL=ultem_2200_polyetherimide_E
 .072, .072
 0.500000, -0.500000, 1.000000
*ELSET, ELSET=voxel_strut5
5, 17, 29, 41, 53, 65
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*BEAM SECTION, SECTION=RECTANGULAR, ELSET=voxel_strut5, MATERIAL=ultem_2200_polyetherimide_E
 .072, .072
 -0.500000, 1.000000, -0.500000
*ELSET, ELSET=voxel_strut6
6, 18, 30, 42, 54, 66
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*BEAM SECTION, SECTION=RECTANGULAR, ELSET=voxel_strut6, MATERIAL=ultem_2200_polyetherimide_E
 .072, .072
 1.000000, -0.500000, -0.500000
*ELSET, ELSET=voxel_strut7
7, 19, 31, 43, 55, 67
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*BEAM SECTION, SECTION=RECTANGULAR, ELSET=voxel_strut7, MATERIAL=ultem_2200_polyetherimide_E
 .072, .072
 0.500000, 1.000000, -0.500000
*ELSET, ELSET=voxel_strut8
8, 20, 32, 44, 56, 68
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*BEAM SECTION, SECTION=RECTANGULAR, ELSET=voxel_strut8, MATERIAL=ultem_2200_polyetherimide_E
 .072, .072
 1.000000, 0.500000, -0.500000
*ELSET, ELSET=voxel_strut9
9, 21, 33, 45, 57, 69
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*BEAM SECTION, SECTION=RECTANGULAR, ELSET=voxel_strut9, MATERIAL=ultem_2200_polyetherimide_E
 .072, .072
 0.500000, 1.000000, -0.500000
*ELSET, ELSET=voxel_strut10
10, 22, 34, 46, 58, 70
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*BEAM SECTION, SECTION=RECTANGULAR, ELSET=voxel_strut10, MATERIAL=ultem_2200_polyetherimide_E
 .072, .072
 1.000000, 0.500000, -0.500000
*ELSET, ELSET=voxel_strut11
11, 23, 35, 47, 59, 71
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*BEAM SECTION, SECTION=RECTANGULAR, ELSET=voxel_strut11, MATERIAL=ultem_2200_polyetherimide_E
 .072, .072
 -0.500000, 1.000000, -0.500000
*ELSET, ELSET=voxel_strut12
12, 24, 36, 48, 60, 72
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*BEAM SECTION, SECTION=RECTANGULAR, ELSET=voxel_strut12, MATERIAL=ultem_2200_polyetherimide_E
 .072, .072
 1.000000, -0.500000, -0.500000
*MATERIAL, NAME=ultem_2200_polyetherimide_E
*ELASTIC
986000., 0.38
*DENSITY
 .0001329
**End of ultem_2200_polyetherimide_E material definitions
*MATERIAL, NAME=Aluminum_E
*ELASTIC
10.e6, 0.3
*DENSITY
 .000253
**End of Aluminum_E material definitions
*NSET, NSET=baseNodes
6, 12, 51, 56, 89, 94
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*BOUNDARY
baseNodes,1,6,0.
*NSET, NSET=movedNodes
457, 462, 496, 500, 534, 538
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*STEP
*FREQUENCY
12
*END STEP
*STEP,INC=40000,NLGEOM
*STATIC
.1,1.,.001
*BOUNDARY
movedNodes,2,2,0.8
*END STEP
