*HEADING
Robot walking model
*NODE, NSET=robot_nodes
1, 1.000000, 0.000000, 0.000000
2, 0.750000, 0.000000, -0.250000
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*NODE, NSET=ground_ref
645, 0., -.76, 0.
*NODE, NSET=RIGID_NODES
646, -10,-1.1,10
647, 10, -1.1, 10
648, 10, -1.1, -10
649, -10, -1.1, -10
*ELEMENT, TYPE=B31, ELSET=BEAM
1, 1, 2
2, 2, 3
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*BEAM SECTION, SECTION=RECTANGULAR, ELSET=BEAM, MATERIAL=STEEL
 1., 2.
*ELEMENT, TYPE=MASS, ELSET=REF_MASS
769,645
*MASS, ELSET=REF_MASS
1000.,
*ELEMENT, TYPE=R3D4, ELSET=GROUND
770, 646,647,648,649
*ELEMENT, TYPE=CONN3D2, ELSET=ACTUATOR1
771,378,538
*ELEMENT, TYPE=CONN3D2, ELSET=ACTUATOR2
772,54,218
*CONNECTOR SECTION, ELSET=ACTUATOR1
axial
*CONNECTOR SECTION, ELSET=ACTUATOR2
axial
*ELEMENT, TYPE=SPRINGA, ELSET=SPRINGS
773,378,538
774,54,218
*SPRING,ELSET=SPRINGS

1.E1,
*MATERIAL, NAME=STEEL
*ELASTIC
 3.E6,.3
 *DENSITY
 .0005
**BOUNDARY
** 478, PINNED
** 156, 2,2,0.
** 438, 2,2,0.
** 398, 2,2,0.
** 358, 2,2,0.
** 33, 2,2,0.
** 74, 2,2,0.
** 115, 2,2,0.
*BOUNDARY
RIGID_NODES, 1,6,0.
ground_ref,1,6,0.
*AMPLITUDE,TIME=TOTAL TIME,VALUE=RELATIVE,NAME=MIN1
0.,0.,.2, 0.,1.2,1.0,2.2,0.
3.2,1.,4.2,0.,5.2,1.,6.2,1.
*AMPLITUDE,TIME=TOTAL TIME,VALUE=RELATIVE,NAME=MIN2
0.,0.,.1, 0.,1.,1.0,2.,0.
3.,-1.,4.0,0.,5.,1.,6.,0.
**
*NSET, NSET=FEET_NODES
478, 156, 438, 398, 358, 33, 74, 115
*SURFACE,TYPE=NODE, NAME=FEET
FEET_NODES
*SURFACE, TYPE=ELEMENT, NAME=GROUND
GROUND,SPOS
*RIGID BODY, ELSET=GROUND, REFNODE=ground_ref
*SURFACE INTERACTION, NAME=INT1
*FRICTION
 0.005,
*SURFACE BEHAVIOR,PENALTY
*CONTACT PAIR,INTERACTION=INT1
FEET,GROUND
**
**Step, name=frequency
**frequency
**Frequency
**50
**End Step
*STEP,INC=10000,NLGEOM
*DYNAMIC
1.0E-4,6.,1.0E-8,.01
*DLOAD
BEAM,GRAV,9810.,0.,-1.,0.
**CLOAD,AMPLITUDE=DYN
**538,2,20.
**218,2,-20.
**BOUNDARY, TYPE=VELOCITY, AMPLITUDE=velocity
**BOUNDARY, AMPLITUDE=MIN1
**538, 1, 1, 1.1
***BOUNDARY, AMPLITUDE=MIN2
**218,3,3,3.1
*CONNECTOR MOTION, AMPLITUDE=MIN2, TYPE=DISPLACEMENT
ACTUATOR1,1,.5
*CONNECTOR MOTION, AMPLITUDE=MIN2, TYPE=DISPLACEMENT
ACTUATOR2,1,-.5
**OUTPUT,HISTORY,TIME INTERVAL=.1
*END STEP
