*STEP, PERTURBATION
*MATRIX GENERATE, STIFFNESS
*MATRIX OUTPUT, STIFFNESS
*END STEP
*STEP, PERTURBATION
*MATRIX GENERATE, LOAD
*CLOAD
6, 1, 20000.
*MATRIX OUTPUT, LOAD
*END STEP
*STEP, PERTURBATION
*STATIC
**
** The load is in pounds
**
*LOAD CASE, NAME=LC1
*CLOAD
6, 1, 20000.
*END LOAD CASE
*END STEP
