*HEADING
Robot walking model
*NODE, NSET=lattice_nodes
1, 1.500000, 0.000000, 0.000000
2, 1.125000, 0.000000, -0.375000
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*NSET, NSET=FEET_NODES
366, 407, 75, 448, 117, 489, 159, 33

*ELEMENT, TYPE=B31, ELSET=BEAM
1, 1, 2, 43
2, 2, 3, 43
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*ELSET, ELSET=voxel_strut1
1, 2, 3, 4, 49, 50
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*BEAM SECTION, SECTION=RECTANGULAR, ELSET=voxel_strut1, MATERIAL=ultem_2200_polyetherimide_E
 .072, .072
 -0.500000, -0.500000, 1.000000
*ELSET, ELSET=voxel_strut2
5, 6, 7, 8, 53, 54
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*BEAM SECTION, SECTION=RECTANGULAR, ELSET=voxel_strut2, MATERIAL=ultem_2200_polyetherimide_E
 .072, .072
 0.500000, -0.500000, 1.000000
*ELSET, ELSET=voxel_strut3
9, 10, 11, 12, 57, 58
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*BEAM SECTION, SECTION=RECTANGULAR, ELSET=voxel_strut3, MATERIAL=ultem_2200_polyetherimide_E
 .072, .072
 -0.500000, -0.500000, 1.000000
*ELSET, ELSET=voxel_strut4
13, 14, 15, 16, 61, 62
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*BEAM SECTION, SECTION=RECTANGULAR, ELSET=voxel_strut4, MATERIAL=ultem_2200_polyetherimide_E
 .072, .072
 0.500000, -0.500000, 1.000000
*ELSET, ELSET=voxel_strut5
17, 18, 19, 20, 65, 66
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*BEAM SECTION, SECTION=RECTANGULAR, ELSET=voxel_strut5, MATERIAL=ultem_2200_polyetherimide_E
 .072, .072
 -0.500000, 1.000000, -0.500000
*ELSET, ELSET=voxel_strut6
21, 22, 23, 24, 69, 70
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*BEAM SECTION, SECTION=RECTANGULAR, ELSET=voxel_strut6, MATERIAL=ultem_2200_polyetherimide_E
 .072, .072
 1.000000, -0.500000, -0.500000
*ELSET, ELSET=voxel_strut7
25, 26, 27, 28, 73, 74
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*BEAM SECTION, SECTION=RECTANGULAR, ELSET=voxel_strut7, MATERIAL=ultem_2200_polyetherimide_E
 .072, .072
 0.500000, 1.000000, -0.500000
*ELSET, ELSET=voxel_strut8
29, 30, 31, 32, 77, 78
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*BEAM SECTION, SECTION=RECTANGULAR, ELSET=voxel_strut8, MATERIAL=ultem_2200_polyetherimide_E
 .072, .072
 1.000000, 0.500000, -0.500000
*ELSET, ELSET=voxel_strut9
33, 34, 35, 36, 81, 82
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*BEAM SECTION, SECTION=RECTANGULAR, ELSET=voxel_strut9, MATERIAL=ultem_2200_polyetherimide_E
 .072, .072
 0.500000, 1.000000, -0.500000
*ELSET, ELSET=voxel_strut10
37, 38, 39, 40, 85, 86
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*BEAM SECTION, SECTION=RECTANGULAR, ELSET=voxel_strut10, MATERIAL=ultem_2200_polyetherimide_E
 .072, .072
 1.000000, 0.500000, -0.500000
*ELSET, ELSET=voxel_strut11
41, 42, 43, 44, 89, 90
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*BEAM SECTION, SECTION=RECTANGULAR, ELSET=voxel_strut11, MATERIAL=ultem_2200_polyetherimide_E
 .072, .072
 -0.500000, 1.000000, -0.500000
*ELSET, ELSET=voxel_strut12
45, 46, 47, 48, 93, 94
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*BEAM SECTION, SECTION=RECTANGULAR, ELSET=voxel_strut12, MATERIAL=ultem_2200_polyetherimide_E
 .072, .072
 1.000000, -0.500000, -0.500000
*NODE, NSET=surface_feet_nodes
661, 3.000000, -1.700000, 0.000000
662, 3.000000, -1.700000, -0.066667
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*ELEMENT, TYPE=S4R, ELSET=SHELLS
769, 661, 664, 663, 662
770, 661, 666, 665, 664
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*ELEMENT, TYPE=B31, ELSET=BEAM_feet_connectors
781, 366, 661
782, 366, 662
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*NODE, NSET=surface_feet_nodes
678, 3.000000, -1.700000, 3.000000
679, 3.000000, -1.700000, 2.933333
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*ELEMENT, TYPE=S4R, ELSET=SHELLS
798, 678, 681, 680, 679
799, 678, 683, 682, 681
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*ELEMENT, TYPE=B31, ELSET=BEAM_feet_connectors
810, 407, 678
811, 407, 679
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*NODE, NSET=surface_feet_nodes
695, 0.000000, -1.700000, 3.000000
696, 0.000000, -1.700000, 2.933333
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*ELEMENT, TYPE=S4R, ELSET=SHELLS
827, 695, 698, 697, 696
828, 695, 700, 699, 698
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*ELEMENT, TYPE=B31, ELSET=BEAM_feet_connectors
839, 75, 695
840, 75, 696
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*NODE, NSET=surface_feet_nodes
712, 3.000000, -1.700000, 6.000000
713, 3.000000, -1.700000, 5.933333
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*ELEMENT, TYPE=S4R, ELSET=SHELLS
856, 712, 715, 714, 713
857, 712, 717, 716, 715
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*ELEMENT, TYPE=B31, ELSET=BEAM_feet_connectors
868, 448, 712
869, 448, 713
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*NODE, NSET=surface_feet_nodes
729, 0.000000, -1.700000, 6.000000
730, 0.000000, -1.700000, 5.933333
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*ELEMENT, TYPE=S4R, ELSET=SHELLS
885, 729, 732, 731, 730
886, 729, 734, 733, 732
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*ELEMENT, TYPE=B31, ELSET=BEAM_feet_connectors
897, 117, 729
898, 117, 730
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*NODE, NSET=surface_feet_nodes
746, 3.000000, -1.700000, 9.000000
747, 3.000000, -1.700000, 8.933333
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*ELEMENT, TYPE=S4R, ELSET=SHELLS
914, 746, 749, 748, 747
915, 746, 751, 750, 749
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*ELEMENT, TYPE=B31, ELSET=BEAM_feet_connectors
926, 489, 746
927, 489, 747
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*NODE, NSET=surface_feet_nodes
763, 0.000000, -1.700000, 9.000000
764, 0.000000, -1.700000, 8.933333
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*ELEMENT, TYPE=S4R, ELSET=SHELLS
943, 763, 766, 765, 764
944, 763, 768, 767, 766
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*ELEMENT, TYPE=B31, ELSET=BEAM_feet_connectors
955, 159, 763
956, 159, 764
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*NODE, NSET=surface_feet_nodes
780, 0.000000, -1.700000, 0.000000
781, 0.000000, -1.700000, -0.066667
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*ELEMENT, TYPE=S4R, ELSET=SHELLS
972, 780, 783, 782, 781
973, 780, 785, 784, 783
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*ELEMENT, TYPE=B31, ELSET=BEAM_feet_connectors
984, 33, 780
985, 33, 781
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*SHELL SECTION, ELSET=SHELLS, MATERIAL=Aluminum_E
 .1
*BEAM SECTION, SECTION=CIRC, ELSET=BEAM_feet_connectors, MATERIAL=Aluminum_E
 .2
*ELSET, ELSET=negZfrictionElems
805, 806, 799, 800, 834, 835, 828, 829
863, 864, 857, 858, 892, 893, 886, 887
921, 922, 915, 916, 950, 951, 944, 945
## 769,775,978,972, 798,804,833,827,862,856,891,885,920,914,949,943
*ELSET, ELSET=posZfrictionElems
776, 777, 770, 771, 979, 980, 973, 974
## 776,770,979, 973, 799,805,828,834,857,863,892,886,921,915,950,944
*ELEMENT, TYPE=CONN3D2, ELSET=ACTUATOR1
1001, 387, 551
*ELEMENT, TYPE=CONN3D2, ELSET=ACTUATOR2
1002, 55, 223
*CONNECTOR SECTION, ELSET=ACTUATOR1
axial
*CONNECTOR SECTION, ELSET=ACTUATOR2
axial
*ELEMENT, TYPE=SPRINGA, ELSET=SPRINGS
1003, 387, 551
1004, 55, 223
*SPRING,ELSET=SPRINGS

1.E1,
*NODE, NSET=ground_ref
797, 0.000000, -1.710000, 0.000000
*NODE, NSET=RIGID_NODES
798, -10.000000, -1.710000, 10.000000
799, 10.000000, -1.710000, 10.000000
800, 10.000000, -1.710000, -10.000000
801, -10.000000, -1.710000, -10.000000
*ELEMENT, TYPE=MASS, ELSET=REF_MASS
1005, 797
*MASS, ELSET=REF_MASS
1000.,
*ELEMENT, TYPE=R3D4, ELSET=GROUND
1006, 798, 799, 800, 801
*SURFACE,TYPE=ELEMENT, NAME=FEET
SHELLS
*SURFACE,TYPE=ELEMENT, NAME=posZ_FEET
posZfrictionElems
*SURFACE,TYPE=ELEMENT, NAME=negZ_FEET
negZfrictionElems
*SURFACE, TYPE=ELEMENT, NAME=GROUND
GROUND,SPOS
*RIGID BODY, ELSET=GROUND, REFNODE=ground_ref
*SURFACE INTERACTION, NAME=friction_posZ
*FRICTION
 0.00001,
*SURFACE BEHAVIOR,PENALTY
*CONTACT PAIR,INTERACTION=friction_posZ
posZ_FEET,GROUND
**
*SURFACE INTERACTION, NAME=friction_negZ
*FRICTION
 0.75,
*SURFACE BEHAVIOR,PENALTY
*CONTACT PAIR,INTERACTION=friction_negZ
negZ_FEET,GROUND
**
*BOUNDARY
ground_ref,1,6,0.
*AMPLITUDE,TIME=TOTAL TIME,VALUE=RELATIVE,NAME=MIN1
0.,0.,.2, 0.,1.2,1.0,2.2,0.
3.2,1.,4.2,0.,5.2,1.,6.2,1.
*AMPLITUDE,TIME=TOTAL TIME,VALUE=RELATIVE,NAME=MIN24
0.,0.,.1, 0.,1.,1.0,2.,0.
3.,-1.,4.0,0.,5.,1.,6.,0.
7.,-1.,8., 0.,9.,1.0,10.,0.
11.,-1.,12., 0.,13.,1.0,14.,0.
15.,-1.,16., 0.,17.,1.0,18.,0.
19.,-1.,20., 0.,21.,1.0,22.,0.
23.,-1.,24., 0.,25.,1.0,26.,0.
27.,-1.,28., 0.,29.,1.0,30.,0.
31.,-1.,32., 0.,33.,1.0,34.,0.
35.,-1.,36., 0.,37.,1.0,38.,0.
39.,-1.,40., 0.,41.,1.0,42.,0.
43.,-1.,44., 0.,45.,1.0,46.,0.
47.,-1.,48., 0.,49.,1.0,50.,0.
51.,-1.,52., 0.,53.,1.0,54.,0.
55.,-1.,56., 0.,57.,1.0,58.,0.
59.,-1.,60., 0.,61.,1.0,62.,0.
*AMPLITUDE,TIME=TOTAL TIME,VALUE=RELATIVE,NAME=oneHz
0.,0.,.1, 0.,.35,1.0,.6,0.
.85,-1.,1.1,0.,1.35,1.,1.6,0.
1.85,-1.,2.1, 0.,2.35,1.0,2.6,0.
2.85,-1.,3.1, 0.,3.35,1.0,3.6,0.
3.85,-1.,4.1, 0.,4.35,1.0,4.6,0.
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59.85,-1.,60.1, 0.,60.35,1.0,60.6,0.
*MATERIAL, NAME=ultem_2200_polyetherimide_E
*ELASTIC
986000., 0.38
*DENSITY
 .0001329
**End of ultem_2200_polyetherimide_E material definitions
*MATERIAL, NAME=Aluminum_E
*ELASTIC
10.e6, 0.3
*DENSITY
 .000253
**End of Aluminum_E material definitions
*STEP,INC=40000,NLGEOM
*DYNAMIC
1.0E-4,60.,1.0E-8,.05
*DLOAD
BEAM,GRAV,99810.,0.,-1.,0.
*CONNECTOR MOTION, AMPLITUDE=oneHz, TYPE=DISPLACEMENT
ACTUATOR1,1,.4
*CONNECTOR MOTION, AMPLITUDE=oneHz, TYPE=DISPLACEMENT
ACTUATOR2,1,.4
*END STEP
