*HEADING
Robot walking model
*NODE, NSET=lattice_nodes
1, 1.000000, 0.000000, 0.000000
2, 0.750000, 0.000000, -0.250000
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*NSET, NSET=FEET_NODES
478, 156, 438, 398, 358, 33, 74, 115
*ELEMENT, TYPE=B31, ELSET=BEAM
1, 1, 2
2, 2, 3
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*BEAM SECTION, SECTION=RECTANGULAR, ELSET=BEAM, MATERIAL=STEEL
 1., 2.
*ELEMENT, TYPE=CONN3D2, ELSET=ACTUATOR1
769, 378, 538
*ELEMENT, TYPE=CONN3D2, ELSET=ACTUATOR2
770, 54, 218
*CONNECTOR SECTION, ELSET=ACTUATOR1
axial
*CONNECTOR SECTION, ELSET=ACTUATOR2
axial
*ELEMENT, TYPE=SPRINGA, ELSET=SPRINGS
771, 378, 538
772, 54, 218
*SPRING,ELSET=SPRINGS

1.E1,
*NODE, NSET=ground_ref
645, 0.000000, -0.760000, 0.000000
*NODE, NSET=RIGID_NODES
646, -10.000000, -1.100000, 10.000000
647, 10.000000, -1.100000, 10.000000
648, 10.000000, -1.100000, -10.000000
649, -10.000000, -1.100000, -10.000000
*ELEMENT, TYPE=MASS, ELSET=REF_MASS
773, 645
*MASS, ELSET=REF_MASS
1000.,
*ELEMENT, TYPE=R3D4, ELSET=GROUND
774, 646, 647, 648, 649
*SURFACE, TYPE=ELEMENT, NAME=GROUND
GROUND,SPOS
*RIGID BODY, ELSET=GROUND, REFNODE=ground_ref
*SURFACE INTERACTION, NAME=INT1
*FRICTION
 0.005,
*SURFACE BEHAVIOR,PENALTY
*CONTACT PAIR,INTERACTION=INT1
FEET,GROUND
**
*BOUNDARY
ground_ref,1,6,0.
*AMPLITUDE,TIME=TOTAL TIME,VALUE=RELATIVE,NAME=MIN1
0.,0.,.2, 0.,1.2,1.0,2.2,0.
3.2,1.,4.2,0.,5.2,1.,6.2,1.
*AMPLITUDE,TIME=TOTAL TIME,VALUE=RELATIVE,NAME=MIN2
0.,0.,.1, 0.,1.,1.0,2.,0.
.,-1.,4.0,0.,5.,1.,6.,0.
*MATERIAL, NAME=STEEL
*ELASTIC
 3.E6,.3
*DENSITY
 .0005
**
*STEP,INC=10000,NLGEOM
*DYNAMIC
1.0E-4,6.,1.0E-8,.01
*DLOAD
BEAM,GRAV,9810.,0.,-1.,0.
*CONNECTOR MOTION, AMPLITUDE=MIN2, TYPE=DISPLACEMENT
ACTUATOR1,1,.5
*CONNECTOR MOTION, AMPLITUDE=MIN2, TYPE=DISPLACEMENT
ACTUATOR2,1,-.5
*END STEP
